units       lj
atom_style  body nparticle 50 1000
boundary    p p p
newton      on

region      box block 0 100 0 100 0 100
create_box  1 box
create_atoms 1 random 500000 12345 box

pair_style  body/nparticle 50.0
pair_coeff  1 1 3.0 4.0 5.0

#fix 1 all nve/body

run         10000
