units       lj
atom_style  body rounded/polyhedron 50 1000
boundary    p p p
newton      on

atom_modify sort 1000 2.0

region      box block 0 100 0 100 0 100
create_box  1 box
create_atoms 1 random 100000 12345 box

pair_style body/rounded/polyhedron 20.0 5.0 0.0 1.0 0.5
pair_coeff * * 100.0 1.0
comm_modify cutoff 2.0

comm_modify vel yes

fix 1 all nve

run         10000
